P := 5.65
T := 7 + 273.15
ROc := 0.7781
Xy := 0.0097
Xa := 0.0013
Xe := 1 - Xa - Xy → 0.989
Xe = 0.989
Zc := 1 - (0.0741*ROc - 0.006 - 0.063*Xa - 0.0575*Xy)^2
Zc = 0.997397
Me := (24.05525*Zc*ROc - 28.0135*Xa - 44.01*Xy)/Xe
Me = 18.4078
H := 128.64 + 47.479*Me
H = 1002.63
T2 := T^2
Xe2 := Xe^2
Xe3 := Xe^3
Xa2 := Xa^2
Xa3 := Xa^3
Xy2 := Xy^2
Xy3 := Xy^3
B1 := -0.425468 + 0.002865*T - 4.62073e-6*T2 + (0.000877118 - 5.56281e-6*T + 8.8151e-9*T2)*H + (-8.24747e-7 + 4.31436e-9*T - 6.08319e-12*T2)*H^2
B1 = -0.0689268
B2 := -0.1446 + 0.00074091*T - 9.1195e-7*T2
B2 = -0.00860757
B23 := -0.339693 + 0.00161176*T - 2.04429e-6*T2
B23 = -0.0486025
B3 := -0.86834 + 0.0040376*T - 5.1657e-6*T2
B3 = -0.142631
Bb := 0.72 + 1.875e-5*(320 - T)^2
Bb = 0.749775
Bm := Xe2*B1 + Xe*Xa*Bb*(B1 + B2) - 1.73*Xe*Xy*(B1*B3)^0.5 + Xa2*B2 + 2*Xa*Xy*B23 + Xy2*B3
Bm = -0.0691537
C1 := -0.302488 + 0.00195861*T - 3.16302e-6*T2 + (0.000646422 - 4.22876e-6*T + 6.88157e-9*T2)*H + (-3.32805e-7 + 2.2316e-9*T - 3.67713e-12*T2)*H^2
C1 = 0.00360471
C2 := 0.0078498 - 3.9895e-5*T + 6.1187e-8*T2
C2 = 0.00147542
C3 := 0.0020513 + 3.4888e-5*T - 8.3703e-8*T2
C3 = 0.00525583
C223 := 0.00552066 - 1.68609e-5*T + 1.57169e-8*T2
C223 = 0.0020306
C233 := 0.00358783 + 8.06674e-6*T - 3.25798e-8*T2
C233 = 0.00329073
Cc := 0.92 + 0.0013*(T - 270)
Cc = 0.933195
p3 := 1/3
Cm := Xe3*C1 + 3*Xe2*Xa*Cc*(C1*C1*C2)^p3 + 2.76*Xe2*Xy*(C1*C1*C3)^p3 + 3*Xe*Xa2*Cc*(C1*C2*C3)^p3 + 6.6*Xe*Xa*Xy*(C1*C2*C3)^p3 + 2.76*Xe*Xy2*(C1*C3*C3)^p3 + Xa3*C2 + 3*Xa2*Xy*C223 + 3*Xa*Xy2*C233 + Xy3*C3
Cm = 0.00360509
b := 1000*P/(2.7715*T)
b = 7.27684
B0 := b*Bm
B0 = -0.503221
C0 := b^2*Cm
C0 = 0.190898
A0 := 1 + 1.5*(B0 + C0)
A0 = 0.531516
A1 := 1 + B0
A1 = 0.496779
A2 := (A0 - (A0^2 - A1^3)^0.5)^p3
A2 = 0.508687
Z := (1 + A2 + A1/A2)/3
Z = 0.828426
Kk := Z/Zc
Kk = 0.830588
